/COM,----------------------------------------------
/COM, ROTOR DISK MODAL & TRANSIENT ANALISYS
/COM,----------------------------------------------
/COM, cantilevered disk-spindle system
/COM,----------------------------------------------

FINISH
/CLEAR, START, NEW
/FILNAM, ModalAnalisys
/TITLE, Tail rotor disk
/UNIT,SI
/INQUIRE,StrJobname,JOBNAME
*USE,testperson.mac

! >>>>> MODEL PARAMETERS <<<<<
*SET, Pi, ACOS(-1)
*AFUN, DEG
*SET,shftlen, 0.50
*SET,shftdia, 0.05
*SET,dskoff, shftlen
*SET,brngoff, 0.12
*SET,dskdia, 1.912/2
*SET,d_i, 1.75/2
*SET,dskthk, 0.10
*SET,bstf, 378e+7 ! Brng Stiffness*SET,
*SET,nmd, 10      ! Number of modes
*SET,nmspn, 8     ! Number of speeds
*SET,mxspn, 2000  ! Max Omega (rpm)

/PREP7
! >>>>> MATERIAL PROPERTIES <<<<<
! Aluminum 7075
MP,EX,1,71.7e+9
MP,DENS,1,2810
MP,NUXY,1,0.33

/COM, -----------------------------------------------
/COM,  MODEL DEFINITION -SHAFT
/COM, -----------------------------------------------
! Build model nodes
N,1
N,8,brngoff
FILL,1,8
N,19,dskoff
FILL,8,19
N,20,nx(19) + 0.02

! Bearing ground nodes
N,101,
N,201,
N,110,NX(8)
N,210,NX(8)

! Use 188 elements
ET,1,BEAM188,,,2
SECTYPE,1,BEAM,CSOLID
SECDATA,shftdia/2
! Make elements
SECNUM,1
TYPE,1
MAT,1
REAL,1
E,1,2
EGEN,18,1,1

/COM, -----------------------------------------------
/COM,  MESH - SHAFT
/COM, -----------------------------------------------
CSYS,0
WPOFFS, NX(20), NY(20), NZ(20)
WPROTA,,,90
/VIEW,1,1,1,1
CYL4,0,0,d_i/2,0,dskdia/2,360

ET,2,SHELL181
SECTYPE,2,SHELL
SECD,dskthk
TYPE,2
SECN,2
MAT,1
MSHKEY,0
ESIZE,0.02
AMESH,ALL

!*** clamp between disk and spindle
ET,3,MASS21
R,3,5,5,5,1.776,0.592,0
TYPE,3
REAL,3
MAT,1
E,20

CERIG,20,19,ALL
LSEL,S,LINE,,5,8,1
NSLL,S,1
NSEL,A,NODE,,20
CERIG,20,ALL,ALL
ALLSEL,ALL,ALL

/COM, -----------------------------------------------
/COM,  BEARINGS
/COM, -----------------------------------------------
ET,4,COMBIN14,,2  !1-D longitudinal spring-damper (UY degree of freedom)
ET,5,COMBIN14,,3  !1-D longitudinal spring-damper (UZ degree of freedom)
R,4,bstf

TYPE,4
REAL,4
E,1,101
E,8,110
TYPE,5
REAL,4
E,1,201
E,8,210

/COM, -----------------------------------------------
/COM,  BOUNDARY CONDITION
/COM, -----------------------------------------------
D,1,UX
D,1,ROTX
D,8,UX
D,4,ROTX
! Fix Brng ground nodes
D,101,ALL
D,201,ALL
D,110,ALL
D,210,ALL
SAVE

EPLOT
! Plot the model
/VIEW,1,1,1,1
*USE, generateimages.mac
/VUP,1,z
*USE, generateimages.mac
*USE, calcmass.mac, %StrJobname(1)%

/TITLE, Tail rotor disk - Modal Analysis
/COM,----------------------------------------------
/COM, Modal Analysis
/COM,----------------------------------------------
/COM, Setup modal run
/COM,----------------------------------------------

/SOLU
ANTYPE,MODAL
CORIOLIS,ON,,,ON
MODOPT,QRDAMP,nmd,,,ON
! Loop on speeds
*DO,i,1,nmspn
	spn = (i-1)*(((2*mxspn*Pi)/60)/(nmspn-1))
	OMEGA,spn
	MXPAND,nmd,,,YES
   SOLVE
*ENDDO
FINISH
SAVE

/COM,----------------------------------------------
/COM, Modal Analysis
/COM,----------------------------------------------
/COM, Post Processing
/COM,----------------------------------------------

/POST1
! Plot/List Campbell Diagrams
/GROPTS,VIEW,1
/YRANGE,0,100
/XRANGE,0,spn*(60/(2*Pi))
/VIEW,1,,,1
/ANG,1
/REP,FAST
/SHOW,PNG
/GFILE,2400,
PLCAMP,,1,RPM
PRCAMP,,1,RPM
/SHOW,CLOSE
!store modal frequencies
PLCAMP,,1,RPM
PRCAMP,,1,RPM

!extract critical speed
*DIM,VeloCrit,ARRAY,4,1
*DO,i,1,4,1
	*GET, VelCrit, CAMP,i, VCRI
	VeloCrit(i,1) = VelCrit
*ENDDO
*SET, i,

!extrac vibration modes
*GET, NumModes, CAMP,,NBMO
*DIM,ModalFreq,ARRAY,NumModes,1
*DO,i,1,NumModes,1
	*GET,OmegaCamp,CAMP,i,FREQ,1
	ModalFreq(i,1) = OmegaCamp
*ENDDO

! print other order
/SHOW,PNG
/GFILE,2400,
PLCAMP,,1,RPM
PRCAMP,,1,RPM
/NOERASE
	PLCAMP,,2,RPM,,  ! plot campbell diagram with 2nd order excitation
	PRCAMP,,2,RPM,,
	PLCAMP,,3,RPM,,  ! plot campbell diagram with 3rd order excitation
	PRCAMP,,3,RPM,,
	PLCAMP,,4,RPM,,  ! plot campbell diagram with 4th order excitation
	PRCAMP,,4,RPM,,
/ERASE
/SHOW,CLOSE

!store data in file
*CFOPEN,'ModalFreq-%StrJobname(1)%','txt'
 *VWRITE,'Num','Omega'
  (7x,A8,3X,A8)
  *VWRITE,sequ,ModalFreq(1,1)
   (F12.0,F12.5)
*CFCLOS

*CFOPEN,'VelocCritic-%StrJobname(1)%','txt'
 *VWRITE,'Num', 'Critical'
  (7x,A8,3X,A8)
  *VWRITE,sequ,VeloCrit(1,1)
   (F12.0,3x,F12.5)
*CFCLOS

/VIEW,1,1,1,1
/ANG,1
/REP,FAST
! Plot orbit
SET,3,1
PLORB
*USE, generateimages.mac
! Animate whirl
SET,3,1
PLNSOL,U,SUM
*USE, generateimages.mac
/vup,1,z
*USE, generateimages.mac
ANHARM
FINISH
SAVE

/TITLE, Tail rotor disk - Transient Analisys
/FILNAM, TransientAnalisys
/COM,----------------------------------------------
/COM, TRANSIENT ANALISYS
/COM,----------------------------------------------
*SET,spin, mxspn
*SET,tinc, 0.5e-3
*SET,tend, 4
*SET,spindot, spin/tend
*SET,nbp, nint(tend/tinc) + 1
*SET,unb, 1.e-4
*SET,f0, unb*dskdia

*dim,spinTab,table,nbp,,,TIME
*dim,rotTab, table,nbp,,,TIME
*dim,fzTab,  table,nbp,,,TIME
*dim,fyTab,  table,nbp,,,TIME
*vfill,spinTab(1,0),ramp,0,tinc
*vfill,rotTab(1,0), ramp,0,tinc
*vfill,fzTab(1,0),  ramp,0,tinc
*vfill,fyTab(1,0),  ramp,0,tinc
tt = 0
*DO,iloop,1,nbp
   spinVal = spindot*tt
   spinTab(iloop,1) = spinVal
   spin2 = spinVal**2
   rotVal = spindot*tt**2/2
   rotTab(iloop,1) = rotVal
   sinr = sin(rotVal)
   cosr = cos(rotVal)
   fzTab(iloop,1)= f0*(-spin2*sinr + spindot*cosr)
   fyTab(iloop,1)= f0*( spin2*cosr + spindot*sinr)
   tt   = tt + tinc
*ENDDO
FINI

! ** transient analysis
/SOLU
ANTYPE,TRANSIENT

TIME,tend
DELTIM,tinc,tinc/10,tinc*10
KBC,0
CORIOLIS,ON,,,ON
OMEGA,spin
F,248,FY,%fyTab%
F,248,FZ,%fzTab%
OUTRES,ALL,ALL
SOLVE
FINISH
SAVE

/PBC,ALL, ,1
/REP
*USE, generateimages.mac

/COM,----------------------------------------------
/COM, TRANSIENT ANALYSIS
/COM,----------------------------------------------
/COM, Post Processing
/COM,----------------------------------------------

/VIEW,1,,,1
/ANG,1
/REPLOT

!generate response graphs
/POST26
/XRANGE,0,tend

NSOL,2,19,U,Z,UZdisk
PROD,3,2,2
NSOL,4,19,U,Y,UYdisk
PROD,5,4,4
ADD,6,3,5
SQRT,7,6,,,Ampl_At_Disk
/AXLAB,Y,Displacement (m)
PLVAR,7
EXTREME,7
/VIEW,1,,,1
/ANG,1
/REP,FAST
/SHOW,PNG
/GFILE,2400,
PLVAR,7
EXTREME,7
/SHOW,CLOSE

ESOL,8,18,19,SMISC,32,Sy_At_Disk
ESOL,9,18,19,SMISC,34,Sz_At_Disk

/AXLAB,Y,Bending Stresses (N/m^2)
/VIEW,1,,,1
/ANG,1
/REP,FAST
PLVAR,8,9
EXTREME,8,9
/SHOW,PNG
/GFILE,2400,
PLVAR,8,9
EXTREME,8,9
/SHOW,CLOSE
FINISH
